k := 1000
n := 1
# Ос= остаток готовые продукцы на начало планового периода, производственый расход равно 0
# м = Выручка от продажи единицй ГП
# c = себестоймость
# N =норма расхода сырья на производства
#
# А = количество продукт которое доставится авто, r = ЖД, s = море
# уравнение прибыл
q1(Oc, m, c, N, A, r, s) := m*k*(A + r + s) - (c*k + N*n)*(A + r + s - Oc) - k*(A + 3*r + 5*s)
q(A1, r1, s1, A2, r2, s2, r3, s4, A5, A6, r6, s6) := q1(50, 10, 5, 1, A1, r1, s1) + q1(45, 15, 8, 2, A2, r2, s2) + q1(25, 20, 10, 1, 0, r3, 0) + q1(75, 8, 2, 1, 0, 0, s4) + q1(90, 5, 3, 1, A5, 0, 0) + q1(5, 9, 8, 0.5, A6, r6, s6)
A1 := 0
r1 := 0
s1 := 0
A2 := 0
r2 := 0
s2 := 0
r3 := 0
s4 := 0
A5 := 0
A6 := 0
r6 := 0
s6 := 0
Given
A1 ≥ 0
A2 ≥ 0
A5 ≥ 0
A6 ≥ 0
r1 ≥ 0
r2 ≥ 0
r3 ≥ 0
r6 ≥ 0
s1 ≥ 0
s2 ≥ 0
s4 ≥ 0
s6 ≥ 0
# Обязательно  производить
A2 + r2 + s2 ≥ 60
A5 ≥ 100
# Максимальное возможное производство единиц
A1 + r1 + s1 ≤ 90
A2 + r2 + s2 ≤ 75
r3 ≤ 75
s4 ≤ 145
A5 ≤ 150
A6 + r6 + s6 ≤ 25
# Ограничение транспортных мест
A1 + A2 + A5 + A6 ≤ 250
r1 + r2 + r3 + r6 ≤ 210
s1 + s2 + s4 + s6 ≤ 300
# Логическое ограничение
A1 ≤ 0.5*(r1 + s1 + A1)
A2 ≤ 0.3*(A2 + r2 + s2)
r2 ≤ 0.5*(A2 + r2 + s2)
s2 ≤ 0.2*(A2 + r2 + s2)
A6 + r6 + s6 ≥ 5
y := Maximize(q, A1, r1, s1, A2, r2, s2, r3, s4, A5, A6, r6, s6)
ORIGIN := 1
productionPlan := [
    y[1] + y[2] + y[3], y[1], y[2], y[3];
    y[4] + y[5] + y[6], y[4], y[5], y[6];
    y[7], 0, y[7], 0;
    y[8], 0, 0, y[8];
    y[9], y[9], 0, 0;
    y[10] + y[11] + y[12], y[10], y[11], y[12]
]
y = [45; 45; 0; 22.5; 37.5; 15; 75; 145; 150; 5; 0; 0]
productionPlan = [90, 45, 45, 0; 75.0001, 22.5, 37.5, 15; 75, 0, 75, 0; 145, 0, 0, 145; 150, 150, 0, 0; 5, 5, 0, 0]
q(y[1], y[2], y[3], y[4], y[5], y[6], y[7], y[8], y[9], y[10], y[11], y[12]) = 2724720
