k := 1000
l := 1
q1(x) := 10*k*(50 + x) - x*(5*k + l)
q2(x) := 15*k*(45 + x) - x*(8*k + 2*l)
q3(x) := 20*k*(25 + x) - x*(10*k + l)
q4(x) := 8*k*(75 + x) - x*(2*k + l)
q5(x) := 5*k*(90 + x) - x*(3*k + l)
q6(x) := 9*k*(5 + x) - x*(8*k + 0.5*l)
q(x1, x2, x3, x4, x5, x6) := q1(x1) + q2(x2) + q3(x3) + q4(x4) + q5(x5) + q6(x6)
x1 := 0
x2 := 0
x3 := 0
x4 := 0
x5 := 0
x6 := 0
Given
0.5*x1 + 0.3*x2 + x5 + x6 ≤ 250
0.5*x2 + x3 + x6 ≤ 210
x1 ≤ 40
x1 ≤ 40
x2 ≤ 30
0.2*x3 + x4 + x6 ≤ 300
x2 + 45 ≥ 60
x5 + 90 ≥ 100
x3 ≤ 50
x4 ≤ 70
x5 ≤ 60
x6 ≤ 20
y := Maximize(q, x1, x2, x3, x4, x5, x6)
y = [40; 30; 50; 70; 60; 20]
q(y[0], y[1], y[2], y[3], y[4], y[5]) = 4239710
